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Ns := 100
t := 0 .. Ns - 1
A := 1
C := 1
Q := 1
Rsh := 0.01
nx := rnorm(Ns, 0, sqrt(Q))
x[0] := 1
P[0] := 1
Ppr[0] := P[0]
Pps[t] := 0
Pps[0] := P[0]
no := rnorm(Ns, 0, sqrt(Rsh))
nxQ[t] := 0
x[t + 1] := A*x[t] + nxQ[t]
z[t] := C*x[t] + no[t]
xpr[0] := 0
estX[0] := 0
R := 10
# P* (Ppr predskaz disp) | Ptilda (Pps disp oshibki izmerenyi)
K :=
    Ppr[0] ← P[0]
    K[0] ← Ppr[0]*C/(C*Ppr[0]*C + R)
    Pps[0] ← Ppr[0] - K[0]*C*Ppr[0]
    for t ∈ 1 .. Ns - 1
        Ppr[t] ← A*Pps[t - 1]*A + Q
        K[t] ← Ppr[t]*C/(C*Ppr[t]*C + R)
        Pps[t] ← Ppr[t] - K[t]*C*Ppr[t]
    K
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# Koefficient usileniya
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estX :=
    estX[0] ← 0
    xpr[1] ← 0
    for t ∈ 1 .. Ns - 1
        estX[t] ← xpr[t - 1] + K[t]*(z[t] - C*xpr[t - 1])
        xpr[t + 1] ← A*estX[t]
    estX
# Otcenka
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# Sum Error
E[t] := |x[t] - estX[t]|
SumErr := mean(E)
SumErr = 0.08665
estX[t] = [
    0; 0.137369; 0.225739; 0.391437; 0.439908; 0.561288; 0.53346; 0.653153; 0.701307; 0.773176
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]
x[t] = [
    1; 1; 1; 1; 1; 1; 1; 1; 1; 1
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]
delay :=
    delay[0] ← 0
    for t ∈ 1 .. Ns - 1
        if |estX[t] - x[t]| < SumErr
            delay ← t
            break
    delay
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E = [
    1; 0.862631; 0.774261; 0.608563; 0.560092; 0.438712; 0.46654; 0.346847; 0.298693; 0.226824
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]
delay = 15
subEstX := submatrix(estX, 1, length(estX) - 1, 0, 0)
minEst := min(subEstX)
maxEst := max(subEstX)
minEst = 0.137369
maxEst = 1.071
