Qm := 1
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Ns := 100
t := 0 .. Ns - 1
A := 0.8
C := 1
Q := 1
R := 10
tt := 0 .. Ns
nx := rnorm(Ns, 0, sqrt(Q))
x[0] := 1
P[0] := 1
Ppr[tt] := 0
Ppr[0] := P[0]
Pps[t] := 0
Pps[0] := P[0]
no := rnorm(Ns, 0, sqrt(R))
nxQ[t] := 0
x[t + 1] := A*x[t] + nx[t]
z[t] := C*x[t] + no[t]
xpr[0] := 0
estX[0] := 0
Rm := 0.01
K :=
    Ppr[0] ← P[0]
    K[0] ← Ppr[0]*C/(C*Ppr[0]*C + Rm)
    Pps[0] ← Ppr[0] - K[0]*C*Ppr[0]
    for t ∈ 1 .. Ns - 1
        Ppr[t] ← A*Pps[t - 1]*A + Qm
        K[t] ← Ppr[t]*C/(C*Ppr[t]*C + Rm)
        Pps[t] ← Ppr[t] - K[t]*C*Ppr[t]
    K
# Koefficient usileniya
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estX :=
    estX[0] ← 0
    xpr[1] ← 0
    for t ∈ 1 .. Ns - 1
        estX[t] ← xpr[t - 1] + K[t]*(z[t] - C*xpr[t - 1])
        xpr[t + 1] ← A*estX[t]
    estX
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# Otcenka
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# Sum Error
E[t] := |x[t] - estX[t]|
SumErr := mean(E)
SumErr = 2.48095
estX[t] = [
    0; -5.88954; 2.80361; 0.951489; -2.49697; -1.67746; -5.26385; 0.545733; -2.43231; -0.43371
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]  # Classic (first min)
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delay :=
    delay ← 0
    for t ∈ 1 .. Ns - 1
        if |x[t] - estX[t]| ≤ SumErr
            delay ← t
            break
    delay
delay = 3
# Global min
totalMin :=
    totalMin ← 100
    for t ∈ 1 .. Ns - 1
        tmp ← |x[t] - estX[t]|
        totalMin ← tmp if tmp ≤ totalMin
    totalMin
x[t] = [
    1; 0.361029; -0.390582; -0.785752; -1.58007; -2.94974; -2.31626; -1.97364; -1.02249; 1.37379
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]
totalMin = 0.093848
delay2 :=
    idx ← 0
    for t ∈ 1 .. Ns - 1
        if |x[t] - estX[t]| == totalMin
            idx ← t
            break
    idx
delay2 = 94
# Poisk indeksa max podposledovatelnosti
eps := stderr(estX, submatrix(x, 1, 100, 0, 0))
delay3 :=
    maxLen ← 0
    curLen ← 0
    startIndex ← -1
    curStart ← -1
    for t ∈ 1 .. Ns - 1
        if |x[t] - estX[t]| ≤ eps
            curStart ← t if curLen == 0
            curLen ← curLen + 1
            if curLen > maxLen
                maxLen ← curLen
                startIndex ← curStart
        curLen ← 0 otherwise
    startIndex
delay3 = 47
# TODO
# Kross-correlyaciya
R_xy(x, y, tau) :=
    N ← length(x)
    sum ← 0
    if tau ≥ 0
        for t ∈ 0 .. N - 1 - tau
            sum ← sum + x[t]*y[t + tau]
    otherwise
        for t ∈ 0 .. N - 1 + tau
            sum ← sum + x[t - tau]*y[t]
    sum
M := 20
tauValues := -M .. M
fillZeros(row, col) := 0
RValues := matrix(M*2 + 1, 1, fillZeros)
for i ∈ 0 .. length(RValues) - 1
    tau ← -M + i
    RValues[i, 0] ← R_xy(x, estX, tau)
maxR := max(RValues)
tauMaxIndex := match(maxR, RValues)[1]
tauMax := -M + tauMaxIndex
delay4 := tauMax
delay4 = -19
