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Ns := 100
t := 0 .. Ns - 1
f := 100
dt := 10^-4
dph := 2*π*f*dt
# Rsh
beta := 0.8
Pp := 1
Rm := 0.01
Q := 0.01
A := [beta, 0; 0, beta]
Qm := [1, 0; 0, 1]
P0 := 1
R := 0.1
nx[0] := rnorm(Ns, 0, sqrt(Q))
nx[1] := rnorm(Ns, 0, sqrt(Q))
V[t] := 1
no := rnorm(Ns, 0, sqrt(R))
K[0] := [0; 0]
vxpr := [0; 0]
estX[0] := vxpr
Nsys := stack(transpose(nx[0]), transpose(nx[1]))
X[:, 0] := [0; 0]
MPpr := [P0, 0; 0, Pp]
MP := [P0, 0; 0, Pp]
X[:, t + 1] := A*X[:, t] + Nsys[:, t]
vC[t] := [cos(dph*t); -sin(dph*t)]
C[t] := vC[t]
z[t] := C[t]*X[:, t] + no[t]
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K :=
    j ← 0
    Pps[j] ← MP
    Ppr[j] ← MPpr
    MPpr ← A*MP*transpose(A) + Qm
    Ppr[j + 1] ← MPpr
    for j ∈ 1 .. Ns - 1
        vK ← Ppr[j]*C[j]/(transpose(C[j])*Ppr[j]*C[j] + V[j])
        K[j] ← vK
        MP ← Ppr[j] - K[j]*transpose(C[j])*Ppr[j]
        Pps[j] ← MP
        MPpr ← A*Pps[j]*transpose(A) + Qm
        Ppr[j + 1] ← MPpr
    K
X = [
    0, 0.0453481, -0.00693524, 0.0206392, -0.202737, 0.00702015, -0.205902, -0.182927, -0.233165, -0.162816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;
    0, -0.0234702, -0.000862912, 0.0434597, 0.103265, -0.0363878, -0.0150239, -0.0413076, -0.0730292, -0.055279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]
Nsys = [
    0.0453481, -0.0432137, 0.0261874, -0.219248, 0.16921, -0.211518, -0.0182048, -0.0868233, 0.0237158, 0.0663036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;
    -0.0234702, 0.0179133, 0.04415, 0.0684976, -0.119, 0.0140864, -0.0292885, -0.0399831, 0.00314436, 0.039005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]
estX :=
    xpr[1] ← vxpr
    for t ∈ 1 .. Ns - 1
        estV ← xpr[t] + K[t]*(z[t] - transpose(C[t])*xpr[t])
        estX[t] ← estV
        xpr[t + 1] ← A*estX[t]
    estX
transpose(X) = [
    0, 0;
    0.0453481, -0.0234702;
    -0.00693524, -0.000862912;
    0.0206392, 0.0434597;
    -0.202737, 0.103265;
    0.00702015, -0.0363878;
    -0.205902, -0.0150239;
    -0.182927, -0.0413076;
    -0.233165, -0.0730292;
    -0.162816, -0.055279
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]
xg1 :=
    for j ∈ 1 .. Ns - 1
        vg ← estX[j]
        xg1[j] ← vg[1]
    xg1
xg2 :=
    for j ∈ 1 .. Ns - 1
        vg ← estX[j]
        xg2[j] ← vg[0]
    xg2
# Sum Error 1 | Sum Error 2
# Otcenka:
E1[t] := |xg1[t] - X[1, t]|
mean(E1) = 0.129465
E2[t] := |xg2[t] - X[0, t]|
mean(E2) = 0.158558
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xg2 = [
    0; 0.124812; 0.0654743; -0.201582; 6.72127e-5; -0.14508; -0.285011; 0.00111727; 0.139288; 0.348234
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]
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xg1 = [
    0; -0.00785252; -0.000916427; 0.0611092; -0.00365955; 0.0560254; 0.12721; -0.0293357; -0.115038; -0.271526
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]
Kg1 :=
    for j ∈ 1 .. Ns - 1
        vg ← K[j]
        Kg1[j] ← vg[1]
    Kg1
Kg0 :=
    for j ∈ 1 .. Ns - 1
        vg ← K[j]
        Kg0[j] ← vg[0]
    Kg0
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