zb1 := READBMP("D:\TGr\__SRecognition\SRLabImages\GZBMP24\giraffe1.bmp")
k := 1 .. 5
N := rows(zb1)
M := cols(zb1)
M = 256
N = 256
i[k] := 1, 25, 50, 166, 200
y := 0 .. 255
x := 0 .. 255
Npx := N*M - 1
Npx = 65535
Counts[y, x] := 0
t := 0 .. Npx/100
Counts :=
    for i ∈ 0 .. N - 1
        for j ∈ 0 .. M - 2
            g1 ← zb1[i, j]
            g2 ← zb1[i, j + 1]
            Counts[g1, g2] ← Counts[g1, g2] + 1
    Counts
s :=
    for i ∈ 0 .. N - 1
        for j ∈ 0 .. M - 1
            ind ← i*M + j
            s[ind] ← zb1[i, j]
    s
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mx := max(s)
mn := min(s)
mx = 237
mn = 0
H := hist(256, s)
j := 0 .. 255
Hx := max(H)
Hx = 1413
H = [
    4; 64; 152; 189; 250; 364; 491; 532; 732; 800
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]
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Counts =  # no stored result
Gq :=
    for i ∈ 0 .. N - 1
        for j ∈ 0 .. M - 1
            Gq[i, j] ← floor(zb1[i, j]/10)
    Gq
x1 := 0 .. 25
y1 := 0 .. 25
qCounts[y1, x1] := 0
Hq := hist(25, Gq)
qCounts :=
    for i ∈ 0 .. N - 1
        for j ∈ 0 .. M - 2
            g1 ← Gq[i, j]
            g2 ← Gq[i, j + 1]
            qCounts[g1, g2] ← qCounts[g1, g2] + 1
    qCounts
Hq = [3578; 9320; 12076; 7168; 2828; 1651; 1409; 1230; 1205; 1286; 1438; 1538; 0; 1681; 1905; 2058; 2300; 2462; 2487; 2341; 2199; 1912; 1156; 284; 24]
qCounts =  # no stored result
