zb1 := READBMP("D:\TGr\__SRecognition\SRLabImages\GZBMP24\dalmatin1.bmp")
N := rows(zb1)
M := cols(zb1)
N = 256
M = 256
s :=
    for i ∈ 0 .. N - 1
        for j ∈ 0 .. M - 1
            ind ← i*M + j
            s[ind] ← zb1[i, j]
    s
