zb1 := READBMP("D:\TGr\__SRecognition\SRLabImages\GZBMP24\zebra1.bmp")
N := rows(zb1)
M := cols(zb1)
gL := 0
gH := 255
Th := mean(zb1)
Th = 126.711
s :=
    for i ∈ 0 .. N - 1
        for j ∈ 0 .. M - 1
            a ← zb1[i, j]
            s[i, j] ← gL if a > Th
            s[i, j] ← gH otherwise
    s
# [component: inputs s]
gL1 := 1
gH1 := 0
s01 :=
    for i ∈ 0 .. N - 1
        for j ∈ 0 .. M - 1
            a ← zb1[i, j]
            s01[i, j] ← gL1 if a > Th
            s01[i, j] ← gH1 otherwise
    s01
out := WRITECSV(s01, "D:\DData\Pictures\BINtxtDataSet\zebra1.txt")
