zb1 := READBMP("D:\DData\Pictures\BMPDataSet\zebra4.bmp")
spzb1 := cfft(zb1)
N := rows(zb1)
M := cols(zb1)
s :=
    for i ∈ 0 .. N/2 - 1
        for j ∈ 0 .. M/2 - 1
            a ← Im(spzb1[i, j])
            b ← Re(spzb1[i, j])
            s[i, j] ← sqrt(a^2 + b^2)
    s
# [component: inputs s]
