H1 := 1/9*[1, 1, 1; 1, 1, 1; 1, 1, 1]
H2 := 1/10*[1, 1, 1; 1, 2, 1; 1, 1, 1]
H3 := 1/16*[1, 1, 1; 1, 1, 1; 1, 1, 1]
A := READBMP("D:\TGr\__SRecognition\SRLabImages\GZBMP24\dalmatin1.bmp")
# [component: inputs A]
H6 := [0, -1, 0; -1, 5, -1; 0, -1, 0]
H4 := 1/16*[2, 1, 2; 1, 4, 1; 2, 1, 2]
H5 := [-1, -1, -1; -1, 9, -1; -1, -1, -1]
A =  # no stored result
H7 := [1, -2, 1; -2, 5, -2; 1, -2, 1]
H8 := [1, 1, 1; 1, -2, 1; -1, -1, -1]
H9 := [1, 1, 1; -1, -2, 1; -1, -1, 1]
H10 := [-1, 1, 1; -1, -2, 1; -1, 1, 1]
H11 := [-1, -1, 1; -1, -2, 1; 1, 1, 1]
H12 := [-1, -1, -1; 1, -2, 1; 1, 1, 1]
H := [1, -2, 1; -2, 5, -2; 1, -2, 1]
H14 := [1, 1, -1; 1, -2, -1; 1, 1, -1]
H15 := [1, 1, 1; 1, -2, -1; 1, -1, -1]
H13 := [1, -1, -1; 1, -2, -1; 1, 1, 1]
S(A) :=
    for y ∈ 1 .. rows(A) - 2
        for x ∈ 1 .. cols(A) - 2
            S[y, x] ← 0
            for by ∈ 0 .. 2
                for bx ∈ 0 .. 2
                    S[y, x] ← A[y - 1 + by, x - 1 + bx]*H[by, bx] + S[y, x]
            S[y, x] ← 0 if S[y, x] < 0
            S[y, x] ← 255 if S[y, x] > 255
    S
H18 := [1, -2, 1; -2, 4, -2; 1, -2, 1]
H16 := [0, -1, 0; -1, 4, -1; 0, -1, 0]
H17 := [-1, -1, -1; -1, 8, -1; -1, -1, -1]
A =  # no stored result
D := S(A)
# [component: inputs D]
D =  # no stored result
